!直接通过结果文件导出displacement
FINISH
/CLEAR
!/NOPR
*DIM,path_write,STRING,128,1
*DIM,path_read,STRING,128,3

path_write(1,1)='C:\Users\asus\Desktop\DT_Crane_Demo_3.0\APP_models\pre_slewer\dopAndCoord\'
!有几个file.rst文件，就将path_read舍为几维数组
path_read(1,1)='C:\Users\asus\Desktop\file'
!path_read(1,1)='C:\Users\asus\Desktop\ansys_0518\car_gear_test\gear_files\dp0\SYS\MECH\file'
!path_read(1,2)='C:\Users\asus\Desktop\ansys_0518\car_gear_test\gear_files\dp0\SYS-1\MECH\file'
!path_read(1,3)='C:\Users\asus\Desktop\ansys_0518\car_gear_test\gear_files\dp0\SYS-2\MECH\file'

/POST1
/MKDIR,path_write(1,1)
/CWD,path_write(1,1)
!最外层循环是对.rst结果文件的循环
*DO,s,1,1,1
    FILE,path_read(1,s),'rst'
    !*IF,s,EQ,1,THEN
    !    FILE,path_read(1,1),'rst'
    !*ELSEIF,s,EQ,2
    !    FILE,path_read(1,2),'rst'
    !*ELSE
    !    FILE,path_read(1,3),'rst'
    !*ENDIF
    INRES,ALL !从结果文件中导入所有数据
    file_name_out=CHRVAL(s)
    *DO,j,1,16,1 !对每个结果文件的时间步的循环
        SET,j
        !PRITER
        !file_name=CHRVAL(j)
        !*CFOPEN,%file_name%,txt
        !ALLS,ALL
        ESEL,S,TYPE,,1
        !ALL也可以，但是ACTIVE稳妥一些
        !NSLE,S,ALL
        NSLE,S,ACTIVE
        !*GET,nmax,NODE,,NUM,MAX
        *GET,n_count,NODE,0,COUNT
        !*GET,n_current,NODE,,NUM,MIN
        *IF,j,EQ,1,THEN
            *DO,n,1,2,1
                *GET,n_current,ELEM,,NUM,MIN
                !n_current=0
                *IF,n,EQ,1,THEN
                    file_name=CHRVAL(0)
                    *CFOPEN,%file_name%,txt
                *ELSE
                    file_name=CHRVAL(1)
                    *CFOPEN,%file_name_out%%file_name%,txt
                *ENDIF

                *DO,m,1,n_count,1
                    n_disp_x = UX(n_current)
                    n_disp_y = UY(n_current)
                    n_disp_z = UZ(n_current)
                    *GET,n_disp_sum,NODE,m,U,SUM
                    !n_disp_sum= SQRT(n_disp_x**2+n_disp_y**2+n_disp_z**2)
                    *VWRITE,CHRVAL(n_current),n_disp_x,n_disp_y,n_disp_z,n_disp_sum
                    (A9,E16.8,E16.8,E16.8,E16.8)
                    n_current=NDNEXT(n_current)
                *ENDDO
            *ENDDO
        *ELSE
            file_name=CHRVAL(j)
            *CFOPEN,%file_name_out%%file_name%,txt
            *GET,n_current,NODE,,NUM,MIN
            *DO,i,1,n_count,1
                n_disp_x = UX(n_current)
                n_disp_y = UY(n_current)
                n_disp_z = UZ(n_current)
                *GET,n_disp_sum,NODE,i,U,SUM
                !n_disp_sum= SQRT(n_disp_x**2+n_disp_y**2+n_disp_z**2)
                *VWRITE,CHRVAL(n_current),n_disp_x,n_disp_y,n_disp_z,n_disp_sum
                (A9,E16.8,E16.8,E16.8,E16.8)
                n_current=NDNEXT(n_current)
            *ENDDO
        *ENDIF
        *CFCLOSE
    *ENDDO
*ENDDO
/GOPR
FINISH
/CLEAR
/DELETE,file,page
/DELETE,CHRVAL(0),txt
!/EOF
