!直接通过结果文件导出坐标
FINISH
/CLEAR
/NOPR

! 外循环次数，也就是rst文件的个数
outter_cycle_times=16
! 内循环次数，也就是每个rst文件中的子步数目。
inner_cycle_times=1
! Components数量
point_quantity=4

*DIM,path_write,STRING,128,1
*DIM,path_read,STRING,128,outter_cycle_times,1
*DIM,str_named_selection,STRING,128,point_quantity

path_read_0='D:\Alai\'
path_read_1='ansys_Al'
path_read_2='ai\Teles'
path_read_3='copic_Bo'
path_read_4='om\70_fi'
path_read_5='les\dp0\'
path_read_6='SYS-'
path_read_7='\M'
path_read_8='ECH\file'


path_write(1,1)='C:\Users\asus\Desktop\coordinates\'
!有几个file.rst文件，就将path_read设为几维数组
!path_read(1,1)='D:\Alai\ansys_Alai\Telescopic Boom\70_files\dp0\SYS-75\MECH\file'
path_read(1,1)='D:\Alai\ansys_Alai\Telescopic Boom\70_files\dp0\SYS-60\MECH\file'
path_read(1,2)='D:\Alai\ansys_Alai\Telescopic Boom\70_files\dp0\SYS-61\MECH\file'
path_read(1,3)='D:\Alai\ansys_Alai\Telescopic Boom\70_files\dp0\SYS-62\MECH\file'
path_read(1,4)='D:\Alai\ansys_Alai\Telescopic Boom\70_files\dp0\SYS-63\MECH\file'
path_read(1,5)='D:\Alai\ansys_Alai\Telescopic Boom\70_files\dp0\SYS-64\MECH\file'
path_read(1,6)='D:\Alai\ansys_Alai\Telescopic Boom\70_files\dp0\SYS-65\MECH\file'
path_read(1,7)='D:\Alai\ansys_Alai\Telescopic Boom\70_files\dp0\SYS-66\MECH\file'
path_read(1,8)='D:\Alai\ansys_Alai\Telescopic Boom\70_files\dp0\SYS-67\MECH\file'
path_read(1,9)='D:\Alai\ansys_Alai\Telescopic Boom\70_files\dp0\SYS-68\MECH\file'
path_read(1,10)='D:\Alai\ansys_Alai\Telescopic Boom\70_files\dp0\SYS-69\MECH\file'
path_read(1,11)='D:\Alai\ansys_Alai\Telescopic Boom\70_files\dp0\SYS-70\MECH\file'
path_read(1,12)='D:\Alai\ansys_Alai\Telescopic Boom\70_files\dp0\SYS-71\MECH\file'
path_read(1,13)='D:\Alai\ansys_Alai\Telescopic Boom\70_files\dp0\SYS-72\MECH\file'
path_read(1,14)='D:\Alai\ansys_Alai\Telescopic Boom\70_files\dp0\SYS-73\MECH\file'
path_read(1,15)='D:\Alai\ansys_Alai\Telescopic Boom\70_files\dp0\SYS-74\MECH\file'
path_read(1,16)='D:\Alai\ansys_Alai\Telescopic Boom\70_files\dp0\SYS-75\MECH\file'

! List-Components
str_named_selection(1,1)='C_1'
str_named_selection(1,2)='C_2'
str_named_selection(1,3)='C_3'
str_named_selection(1,4)='C_4'

/POST1
/MKDIR,path_write(1,1)
/CWD,path_write(1,1)
!最外层循环是对.rst结果文件的循环
file_name_middle='_'

*DO,s,1,outter_cycle_times,1
    path_insert=CHRVAL(59+s)
    FILE,%path_read_0%%path_read_1%%path_read_2%%path_read_3%%path_read_4%%path_read_5%%path_read_6%%path_insert%%path_read_7%%path_read_8%,'rst'
    INRES,ALL
    !file_name=CHRVAL(s)
    !*CFOPEN,%file_name%,txt
    !a=%path_read_0%%path_read_1%%path_read_2%%path_read_3%%path_read_4%%path_read_5%%path_read_6%%path_insert%%path_read_7%%path_read_8%
    !*VWRITE,a
    !%C
    !*CFCLOSE

*ENDDO
/GOPR
FINISH
/CLEAR
/DELETE,file,page
/DELETE,RPCRequestTmp,out
/DELETE,CHRVAL(0),txt
!/EOF
