!直接通过结果文件导出equivalent stress
FINISH
/CLEAR
*DIM,path_,STRING,128
!path_(1)='D:/Alai/ansys_Alai/Crane/Crane_Parts_v2.0/truss/20191220_files/dp0/SYS-3/MECH/file'
path_(1)='D:\Alai\ansys_Alai\Crane\Crane_Parts_v2.0\truss\20191220_files\dp0\SYS-3\MECH\file'
/POST1
FILE,path_(1),'rst'
INRES,ALL
*DO,j,1,16,1
    SET,j
    PRITER
    *CFOPEN,/equivalent_stress/CHRVAL(j),txt
    ALLS,ALL
    *GET,nmax,NODE,,NUM,MAX
    *GET,nmin,NODE,,NUM,MIN
    *DO,i,nmin,nmax,1
         *GET,s_eqv,NODE,i,S,EQV
         *VWRITE,CHRVAL(i),s_eqv
         (A9,F16.8)
    *ENDDO
    *CFCLOSE
*ENDDO
FINISH
/EOF
